**  *******************************************************************
**   Abaqus/fromAnsys 6.16-1
**
**   reading Ansys data from: C:\Users\Administrator\Desktop\0530.cdb
**     creating Abaqus input: C:\Users\Administrator\Desktop\0530.inp
**    writing diagnostics to: C:\Users\Administrator\Desktop\0530.log
**
**   Ansys Commands processed:
**        command   number
**   ------------   ------
**           ACEL        1
**          CGLOC        1
**        CGOMEGA        1
**         DCGOMG        1
**         DOMEGA        1
**         EBLOCK        1
**             ET        2
**         MPTEMP        6
**         MPDATA        6
**         NBLOCK        1
**          OMEGA        1
**           *SET       21
**           TIME        1
**   Ansys Commands NOT processed:
**        command   number
**   ------------   ------
**         ALPHAD        1
**          BETAD        1
**         BFUNIF        1
**         CRPLIM        2
**         DMPRAT        1
**            DOF        1
**          *ELSE        1
**         *ENDIF        1
**          ERESX        1
**         EXTOPT        3
**         FINISH        1
**            /GO        1
**            *IF        1
**           IRLF        1
**           KUSE        1
**              N        2
**           NCNV        1
**          NEQIT        1
**          /NOPR        1
**         NUMOFF        5
**         /PREP7        1
**        SECTYPE        4
**         /TITLE        1
**           TREF        1
**
*Heading
** Job name: try3 Model name: new3
** Generated by: Abaqus/CAE 2016
*Preprint, echo=NO, model=NO, history=NO, contact=NO
**
** PARTS
**
*Part, name=PART-1
*Node
      1,           0.,           0.,           0.
      2,           0.,           0.,           3.
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*Element, type=B31
  1,   1,   3
  2,   3,   2
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*Element, type=S4R
125,  71,  73, 111,  97
126,  73,  68,  98, 111
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*Elset, elset=ES2_M1_E1_R1
   1,   2,   3,   4,   5,   6
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*Elset, elset=ES3_M1_E1_R1
  49,  50,  51,  52,  53,  54
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*Elset, elset=ES4_M1_E1_R1
  61,  62,  63,  64,  65,  66
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*Elset, elset=ES5_M1_E2_R1
  125,  126,  127,  128,  129,  130
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*Elset, elset=_I2, internal
  49,  50,  51,  52,  53,  54
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*Elset, elset=_I3, internal
  59,  60,  71,  72,  83,  84
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*Elset, elset=_I4, internal
  61,  62,  63,  64,  65,  66
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*Elset, elset=_I5, internal
  99, 100, 101, 102, 103, 104
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** Section: Section-1-ES2_M1_E1_R1  Profile: Profile-1
*Beam Section, elset=ES2_M1_E1_R1, material=MATERIAL-1, temperature=GRADIENTS, section=RECT
0.5, 0.5
0.,1.,0.
** Section: Section-2-_I2  Profile: Profile-2
*Beam Section, elset=_I2, material=MATERIAL-1, temperature=GRADIENTS, section=RECT
0.3, 0.5
0.,-1.,0.
** Section: Section-3-_I3  Profile: Profile-3
*Beam Section, elset=_I3, material=MATERIAL-1, temperature=GRADIENTS, section=RECT
0.3, 0.5
0.,0.,-1.
** Section: Section-4-_I4  Profile: Profile-4
*Beam Section, elset=_I4, material=MATERIAL-1, temperature=GRADIENTS, section=I
0.25, 0.5, 0.2, 0.2, 0.016, 0.016, 0.01
0.,1.,-0.
** Section: Section-5-_I5  Profile: Profile-5
*Beam Section, elset=_I5, material=MATERIAL-1, temperature=GRADIENTS, section=I
0.25, 0.5, 0.2, 0.2, 0.016, 0.016, 0.01
0.,0.,-1.
** Section: Section-6-ES5_M1_E2_R1
*Shell Section, elset=ES5_M1_E2_R1, material=MATERIAL-1
1., 3
*End Part
**
**
** ASSEMBLY
**
*Assembly, name=Assembly
**
*Instance, name=PART-1-1, part=PART-1
*End Instance
**
*Nset, nset=SET-1, instance=PART-1-1
   1,   2,   3,   4,   5,   6
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*Nset, nset=SET-2, instance=PART-1-1, generate
  1,  70,   3
*Nset, nset=SET-3, instance=PART-1-1
   1,   2,   3,   4,   5,   6
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*Nset, nset=_PICKEDSET7, internal, instance=PART-1-1, generate
  1,  70,   3
*End Assembly
*Amplitude, name=AMP-1, definition=SMOOTH STEP
           0.02,          0.0063,            0.04,         0.00364,            0.06,         0.00099,            0.08,         0.00428
            0.1,         0.00758,            0.12,         0.01087,            0.14,         0.00682,            0.16,         0.00277
           0.18,        -0.00128,             0.2,         0.00368,            0.22,         0.00864,            0.24,          0.0136
           0.26,         0.00727,            0.28,         0.00094,             0.3,          0.0042,            0.32,         0.00221
           0.34,         0.00021,            0.36,         0.00444,            0.38,         0.00867,             0.4,          0.0129
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          30.98,        -0.00063,             31.,        -0.00057
**
** MATERIALS
**
**   ---------------------------------------------------
**   ---- *MATERIAL ------------------------------------
**   ---------------------------------------------------
**
*Material, name=MATERIAL-1
*Damping, alpha=1., beta=0.3, composite=10., structural=20.
*Density
2500.,
*Elastic
 3e+10, 0.2
*Material, name=MATERIAL-2
*Damping, alpha=1., beta=0.3, composite=10., structural=20.
*Density
7800.,
*Elastic
 2e+11, 0.3
** ----------------------------------------------------------------
**
** STEP: Step-2
**
*Step, name=Step-2, nlgeom=NO, inc=10000
*Dynamic,direct
0.02,31.,
**
** BOUNDARY CONDITIONS
**
** Name: Acc-BC-1 Type: Acceleration/Angular acceleration
*Boundary, amplitude=AMP-1, type=ACCELERATION
_PICKEDSET7, 1, 1, 1.
** Name: Acc-BC-2 Type: Acceleration/Angular acceleration
*Boundary, amplitude=AMP-1, type=ACCELERATION
_PICKEDSET7, 2, 2
** Name: Acc-BC-3 Type: Acceleration/Angular acceleration
*Boundary, amplitude=AMP-1, type=ACCELERATION
_PICKEDSET7, 3, 3
** Name: Acc-BC-4 Type: Acceleration/Angular acceleration
*Boundary, amplitude=AMP-1, type=ACCELERATION
_PICKEDSET7, 4, 4
** Name: Acc-BC-5 Type: Acceleration/Angular acceleration
*Boundary, amplitude=AMP-1, type=ACCELERATION
_PICKEDSET7, 5, 5
** Name: Acc-BC-6 Type: Acceleration/Angular acceleration
*Boundary, amplitude=AMP-1, type=ACCELERATION
_PICKEDSET7, 6, 6
**
** LOADS
**
** Name: GRAVITY-1   Type: Gravity
*Dload
, GRAV, 9.8, 0., 0., -1.
**
** OUTPUT REQUESTS
**
*Restart, write, frequency=0
**
** FIELD OUTPUT: F-Output-1
**
*Output, field, frequency=1
*Node Output, nset=SET-1
A, U
**
** HISTORY OUTPUT: H-Output-1
**
*Output, history, frequency=1
*Node Output, nset=SET-1
A1,
*End Step
