**     *******************************************************************
**      Abaqus/fromAnsys 6.17-1
**
**      reading Ansys data from: C:\Users\Administrator\Desktop\Homework070302.c
** d
**  b
**        creating Abaqus input: C:\Users\Administrator\Desktop\Homework070302.i
** n
**  p
**       writing diagnostics to: C:\Users\Administrator\Desktop\Homework070302.l
** o
**  g
**
**      Ansys Commands processed:
**           command   number
**      ------------   ------
**              ACEL        1
**            ANTYPE        1
**             CGLOC        1
**           CGOMEGA        1
**                 D       72
**            DCGOMG        1
**            DOMEGA        1
**            EBLOCK        1
**                ET        4
**             EQSLV        1
**            MPTEMP        8
**            MPDATA        8
**            NBLOCK        1
**             OMEGA        1
**           RLBLOCK        1
**              *SET       39
**      Ansys Commands NOT processed:
**           command   number
**      ------------   ------
**            ALPHAD        1
**             BETAD        1
**            BFUNIF        1
**              *DIM        3
**            DMPRAT        1
**               DOF        1
**             *ELSE        1
**            *ENDIF        1
**             ERESX        1
**            EXTOPT        3
**            FINISH        1
**               /GO        1
**               *IF        1
**               KBC        1
**                 N        1
**             /NOPR        1
**            NUMOFF        5
**            /PREP7        1
**            /TITLE        1
**              TREF        1
**
*Heading
** Job name: Job-1 Model name: Job-10
** Generated by: Abaqus/CAE 2016
*Preprint, echo=NO, model=NO, history=NO, contact=NO
**
** PARTS
**
*Part, name=PART-1
*Node
      1,           0.,           0.,           0.
      2,           0.,           0.,           4.
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*Element, type=B31
  1,   1,   3
  2,   3,   2
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*Element, type=S4
243,   2,  85, 136,  91
244,  85,   5, 115, 136
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*Elset, elset=ES2_M1_E2_R2
   1,   2,   3,   4,   5,   6
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*Elset, elset=ES3_M2_E3_R3
 133, 134, 135, 136, 137, 138
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*Elset, elset=ES4_M1_E4_R4, generate
 243,  314,    1
*Elset, elset=SET-4
 113, 114, 115, 116, 117, 118
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*Elset, elset=SET-5
  73,  74,  75,  76,  77,  78
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*Elset, elset=_I1, internal, generate
  1,  72,   1
*Elset, elset=_I2, internal
  73,  74,  75,  76,  77,  78
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*Elset, elset=_I3, internal
 113, 114, 115, 116, 117, 118
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*Elset, elset=_I4, internal
 133, 134, 135, 136, 137, 138
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*Elset, elset=_I5, internal
 161, 162, 163, 164, 165, 166
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** Section: Section-1-_I1  Profile: Profile-1
*Beam General Section, elset=_I1, section=GENERAL
0.15, 0.001125, 0., 0.001125, 0.00425
0.,1.,0.
 3e+10, 1.25e+10,       0.
*Section Points
0.15, 0.25, 0.15, -0.25, -0.15, -0.25, -0.15, 0.25
** Section: Section-2-_I2  Profile: Profile-2
*Beam General Section, elset=_I2, section=GENERAL
0.15, 0.001125, 0., 0.001125, 0.00425
0.,0.,-1.
 3e+10, 1.25e+10,       0.
*Section Points
0.15, 0.25, 0.15, -0.25, -0.15, -0.25, -0.15, 0.25
** Section: Section-3-_I3  Profile: Profile-3
*Beam General Section, elset=_I3, section=GENERAL
0.15, 0.001125, 0., 0.001125, 0.00425
0.,0.,-1.
 3e+10, 1.25e+10,       0.
*Section Points
0.15, 0.25, 0.15, -0.25, -0.15, -0.25, -0.15, 0.25
** Section: Section-4-_I4  Profile: Profile-4
*Beam General Section, elset=_I4, section=GENERAL
0.01108, 0.00046037, 0., 2.1372e-05, 0.00048174
0.,0.,-1.
 2.1e+11, 8.75e+10,       0.
*Section Points
0.1, 0.25, 0.1, -0.25, -0.1, -0.25, -0.1, 0.25
** Section: Section-5-_I5  Profile: Profile-5
*Beam General Section, elset=_I5, section=GENERAL
0.01108, 0.00046037, 0., 2.1372e-05, 0.00048174
0.,0.,-1.
 2.1e+11, 8.75e+10,       0.
*Section Points
0.1, 0.25, 0.1, -0.25, -0.1, -0.25, -0.1, 0.25
** Section: Section-6-ES4_M1_E4_R4
*Shell Section, elset=ES4_M1_E4_R4, material=MATERIAL-1
0.1, 5
*End Part
**
**
** ASSEMBLY
**
*Assembly, name=Assembly
**
*Instance, name=PART-1-1, part=PART-1
*End Instance
**
*Nset, nset=ALL, instance=PART-1-1, generate
   1,  153,    1
*Nset, nset=NS_BOUNDARY_5, instance=PART-1-1, generate
  1,  34,   3
*Nset, nset=SET-2, instance=PART-1-1, generate
  1,  34,   3
*End Assembly
*Amplitude, name=AMP-1, definition=SMOOTH STEP
           0.02,          0.0063,            0.04,         0.00364,            0.06,         0.00099,            0.08,         0.00428
            0.1,         0.00758,            0.12,         0.01087,            0.14,         0.00682,            0.16,         0.00277
           0.18,        -0.00128,             0.2,         0.00368,            0.22,         0.00864,            0.24,          0.0136
           0.26,         0.00727,            0.28,         0.00094,             0.3,          0.0042,            0.32,         0.00221
           0.34,         0.00021,            0.36,         0.00444,            0.38,         0.00867,             0.4,          0.0129
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          30.98,        -0.00063,             31.,        -0.00057
**
** MATERIALS
**
**      ---------------------------------------------------
**      ---- *MATERIAL ------------------------------------
**      ---------------------------------------------------
**
*Material, name=MATERIAL-1
*Density
2500.,
*Elastic
 3e+10, 0.2
*Material, name=MATERIAL-2
*Density
7800.,
*Elastic
 2.1e+11, 0.2
** ----------------------------------------------------------------
**
** STEP: Step-1
**
*Step, name=Step-1, nlgeom=NO, inc=10000
*Dynamic,direct
0.02,31.,
**
** BOUNDARY CONDITIONS
**
** Name: Disp-BC-1 Type: Displacement/Rotation
*Boundary, amplitude=AMP-1
SET-2, 1, 1, 1.
** Name: Disp-BC-2 Type: Displacement/Rotation
*Boundary, amplitude=AMP-1
SET-2, 2, 2
** Name: Disp-BC-3 Type: Displacement/Rotation
*Boundary, amplitude=AMP-1
SET-2, 3, 3
** Name: Disp-BC-4 Type: Displacement/Rotation
*Boundary, amplitude=AMP-1
SET-2, 4, 4
** Name: Disp-BC-5 Type: Displacement/Rotation
*Boundary, amplitude=AMP-1
SET-2, 5, 5
** Name: Disp-BC-6 Type: Displacement/Rotation
*Boundary, amplitude=AMP-1
SET-2, 6, 6
**
** OUTPUT REQUESTS
**
*Restart, write, frequency=0
**
** FIELD OUTPUT: F-Output-1
**
*Output, field, variable=PRESELECT
**
** HISTORY OUTPUT: H-Output-1
**
*Output, history, frequency=1
*Node Output, nset=ALL
A1,
*End Step
